*HEADING
    VVER_1000_heavy_reflector
*NODE, NSET=ALL
    1, 828.23981055246, -1524.5470856015, 0.0
    2, -828.23981055246, -1524.5470856015, 0.0
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*NSET, NSET=CANALS
    28,   29,   30,   31,   32,   33
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*NSET, NSET=IN
    7,   8,   9,  10,  11,  12
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*NSET, NSET=OUT
    1,   2,   3,   4,   5,   6
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*ELEMENT, type=S4, ELSET=ALL
    1348, 1811, 6392, 4236, 6640
    1349, 7196, 6712, 3753, 5699
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*ELSET, ELSET=CANALS-S3
    1917, 1919, 1924, 2011, 2304, 2306
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*ELSET, ELSET=CANALS-S4
    1508, 1819, 1825, 1826, 1827, 1830
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*ELSET, ELSET=CANALS-S5
    1815, 1816, 1817, 1818, 1821, 1822
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*ELSET, ELSET=CANALS-S6
    1369, 1409, 1551, 1579, 1586, 1922
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*ELSET, ELSET=IN-S3
    2353, 4675, 4827, 4829, 4837, 4885
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*ELSET, ELSET=IN-S4
    2353, 2463, 2483, 2543, 2578, 2608
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*ELSET, ELSET=IN-S5
    1376, 1528, 2542, 3348, 3351, 3362
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*ELSET, ELSET=IN-S6
    1928, 1929, 1930, 2659, 2660, 4152
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*ELSET, ELSET=OUT-S3
    1467, 1566, 1594, 1602, 1675, 1692
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*ELSET, ELSET=OUT-S4
    1633, 1689, 1783, 2059, 2063, 2068
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*ELSET, ELSET=OUT-S5
    1634, 1688, 2062, 2083, 2207, 2439
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*ELSET, ELSET=OUT-S6
    1466, 1601, 1716, 1781, 2017, 2425
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*SURFACE, name=CANALS, type=ELEMENT
    CANALS-S3, S3
    CANALS-S4, S4
    CANALS-S5, S5
    CANALS-S6, S6
*SURFACE, name=IN, type=ELEMENT
    IN-S3, S3
    IN-S4, S4
    IN-S5, S5
    IN-S6, S6
*SURFACE, name=OUT, type=ELEMENT
    OUT-S3, S3
    OUT-S4, S4
    OUT-S5, S5
    OUT-S6, S6
*MATERIAL, NAME=Steel-08Cr18Ni10Ti-heating
    *Conductivity
        16.6e-3,  20.
        17.2e-3, 100.
        18.0e-3, 200.
        18.7e-3, 300.
        19.4e-3, 400.
        20.1e-3, 500.
        20.8e-3, 600.
    *Density
        7.900e-6,  20.
        7.862e-6, 100.
        7.821e-6, 200.
        7.778e-6, 300.
        7.732e-6, 400.
        7.684e-6, 500.
        7.634e-6, 600.
    *Specific Heat
        478.,  20.
        495., 100.
        516., 200.
        537., 300.
        558., 400.
        579., 500.
        600., 600.
*SHELL SECTION, ELSET=ALL, MATERIAL=Steel-08Cr18Ni10Ti-heating
    1
*INITIAL CONDITIONS, TYPE=TEMPERATURE
    ALL, 280.
*STEP, nlgeom=NO, inc=5
    *HEAT TRANSFER, steady state
        1., 1., 1., 1.,
    *NODE FILE
        NT,
    *NODE PRINT, NSET=ALL
        NT,
    *DFLUX
        1348, BF, 3.097e-03
        1349, BF, 1.211e-03
        1350, BF, 4.197e-03
        1351, BF, 1.979e-03
        1352, BF, 3.202e-03
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        8125, BF, 1.211e-03
    *FILM
        IN, F0, 320., 30e-3
        OUT, F0, 291., 3e-3
        CANALS, F0, 291., 3e-3
    *END STEP
