**
**   Structure: fluid flow between two cylinders.
**   Test objective: compressible Couette flow with fixed
**                   wall temperature.
**                   pressure at the outside: 53.8?
**                   present calculation reaches 73 after 100,000 iter.
**                   max temperature: 1.5
**
*NODE, NSET=Nall
       1,-1.000000000000e+00,0.000000000000e+00,0.000000000000e+00
       2,-9.807852804032e-01,1.950903220161e-01,0.000000000000e+00
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*ELEMENT, TYPE=F3D8, ELSET=Eall
     1,     1,     2,     3,     4,     5,     6,     7,     8
     2,     5,     6,     7,     8,     9,    10,    11,    12
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** Names based on wallin
*NSET,NSET=Nwallin
17,
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** Names based on wallout
*NSET,NSET=Nwallout
151,
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*TRANSFORM,TYPE=C,NSET=Nall
0.,0.,0.,0.,0.,1.
*MATERIAL,NAME=AIR
*FLUID CONSTANTS
1.,1.,1.
*CONDUCTIVITY
1.
*SPECIFIC GAS CONSTANT
0.285714286d0
*SOLID SECTION,ELSET=Eall,MATERIAL=AIR
*PHYSICAL CONSTANTS,ABSOLUTE ZERO=0.
*INITIAL CONDITIONS,TYPE=PRESSURE
Nall,1.
*INITIAL CONDITIONS,TYPE=FLUID VELOCITY
Nall,1,0.
Nall,2,0.
Nall,3,0.
*INITIAL CONDITIONS,TYPE=TEMPERATURE
Nall,1.
*NSET,NSET=Nrad
187,183,179,175,171,89,87,85,83,81
*STEP,INCF=100
*CFD,STEADY STATE,COMPRESSIBLE
*BOUNDARY
Nall,3,3,0.
Nwallin,1,1,0.
Nwallin,2,2,2.
Nwallin,8,8,1.
Nwallin,11,11,1.
Nwallout,1,1,0.
Nwallout,2,2,1.
Nwallout,11,11,1.
*NODE PRINT,FREQUENCYF=100,NSET=Nrad,GLOBAL=YES
VF,PSF,TSF
*NODE FILE,FREQUENCYF=100
VF,PSF,TSF
*END STEP
