**
**   Structure: 2d Couette incompressible concentric fluid flow
**              in a rotating coordinate system
**   Test objective: CFD Finite Element Method
**                   inner wall: tangential velocity 0, temperature 1.
**                   outer wall: tangential velocity -3, temperature 1.
**                   linearly increasing centrifugal loading (amplitude)
**                   transient calculation
**
*NODE, NSET=Nall
       1,-1.000000000000e+00,0.000000000000e+00,0.000000000000e+00
       2,-9.807852804032e-01,1.950903220161e-01,0.000000000000e+00
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*ELEMENT, TYPE=F3D8, ELSET=Eall
     1,     1,     2,     3,     4,     5,     6,     7,     8
     2,     5,     6,     7,     8,     9,    10,    11,    12
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*NSET,NSET=Nwallin
17,
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*NSET,NSET=Nwallout
151,
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*TRANSFORM,TYPE=C,NSET=Nall
0.,0.,0.,0.,0.,1.
*MATERIAL,NAME=WATER
*DENSITY
1.
*FLUID CONSTANTS
1.,1.
*CONDUCTIVITY
1.
*SOLID SECTION,ELSET=Eall,MATERIAL=WATER
*INITIAL CONDITIONS,TYPE=PRESSURE
Nall,1.
*INITIAL CONDITIONS,TYPE=FLUID VELOCITY
Nall,1,0.
Nall,2,0.
Nall,3,0.
*INITIAL CONDITIONS,TYPE=TEMPERATURE
Nall,1.
*NSET,NSET=Nrad
187,183,179,175,171
*AMPLITUDE,NAME=A1
0.,0.,.1,1.
*STEP,INCF=5000
*CFD
.08,0.08
*DLOAD,AMPLITUDE=A1
Eall,CENTRIF,16.,0.,0.,0.,0.,0.,1.
*BOUNDARY
Nall,3,3,0.
Nwallin,1,1,0.
Nwallin,2,2,0.
Nwallin,8,8,1.
Nwallin,11,11,1.
Nwallout,1,1,0.
Nwallout,2,2,-3.
Nwallout,11,11,1.
*NODE PRINT,FREQUENCYF=5000,NSET=Nrad,GLOBAL=YES
VF,PSF,TSF
** ------ Addition ------
*NODE file
VF,PSF,TSF
** ------ Addition ------(end)
*END STEP
