*Node
    1, -1.67766667E+002, 1.26250000E+002, -4.70001825E-014
    2, -1.65000000E+002, 1.26250000E+002, -4.63858591E-014
    3, -1.64693694E+002, 1.26106147E+002, -3.06621537E+000
    4, -1.67766667E+002, 1.27438889E+002, -4.70800099E-014
    5, -1.65000000E+002, 1.27366667E+002, -4.64608371E-014
    6, -1.64694173E+002, 1.27227084E+002, -3.06383714E+000
    7, -1.66383333E+002, 1.26250000E+002, -4.66930208E-014
    8, -1.64846847E+002, 1.26178074E+002, -1.53310769E+000
    9, -1.66230180E+002, 1.26178074E+002, -1.53310769E+000
    10, -1.66383333E+002, 1.27402778E+002, -4.67704235E-014
    11, -1.64847087E+002, 1.27296876E+002, -1.53191857E+000
    12, -1.66230420E+002, 1.27332987E+002, -1.53191857E+000
    13, -1.67766667E+002, 1.26844444E+002, -4.70400962E-014
    14, -1.65000000E+002, 1.26808333E+002, -4.64233481E-014
    15, -1.64693933E+002, 1.26666616E+002, -3.06502626E+000
*Element, Type=C3D15, Elset=ALL
    1, 1, 2, 3, 4, 5, 6, 7, 8, 9, 10, 11, 12, 13, 14, 15
*Material, Name=STEEL
    *Density
        7.85E-09
    *Elastic
        210000, 0.3
*Solid section, Elset=ALL, Material=STEEL
*Step, Perturbation
    *Frequency
        1
    *Node file
        RF, U
    *El file
        E, S
*End step
