*Node
    1, -1.86500000E+002, 1.30900000E+002, -1.06581410E-014
    2, -1.86500000E+002, 1.29350000E+002, -1.06581410E-014
    3, -1.86500000E+002, 1.29197070E+002, -3.30782069E+000
    4, -1.86500000E+002, 1.30740458E+002, -3.45083664E+000
    5, -1.84866667E+002, 1.30900000E+002, -2.75712192E-014
    6, -1.84866667E+002, 1.29350000E+002, -2.75685304E-014
    7, -1.84866667E+002, 1.29197070E+002, -3.30782069E+000
    8, -1.84866667E+002, 1.30740458E+002, -3.45083664E+000
    9, -1.86500000E+002, 1.30125000E+002, -1.06581410E-014
    10, -1.86500000E+002, 1.29273535E+002, -1.65391034E+000
    11, -1.86500000E+002, 1.29968764E+002, -3.37932867E+000
    12, -1.86500000E+002, 1.30820229E+002, -1.72541832E+000
    13, -1.84866667E+002, 1.30125000E+002, -2.75698748E-014
    14, -1.84866667E+002, 1.29273535E+002, -1.65391034E+000
    15, -1.84866667E+002, 1.29968764E+002, -3.37932867E+000
    16, -1.84866667E+002, 1.30820229E+002, -1.72541832E+000
    17, -1.85683333E+002, 1.30900000E+002, -1.91146801E-014
    18, -1.85683333E+002, 1.29350000E+002, -1.91133357E-014
    19, -1.85683333E+002, 1.29197070E+002, -3.30782069E+000
    20, -1.85683333E+002, 1.30740458E+002, -3.45083664E+000
*Element, Type=C3D20, Elset=ALL
    1, 1, 2, 3, 4, 5, 6, 7, 8, 9, 10, 11, 12, 13, 14, 15
    16, 17, 18, 19, 20
*Material, Name=STEEL
    *Density
        7.85E-09
    *Elastic
        210000, 0.3
*Solid section, Elset=ALL, Material=STEEL
*Step, Perturbation
    *Frequency
        1
    *Node file
        RF, U
    *El file
        E, S
*End step
