*NODE, NSET=ALL
	1, 0.0, 10.0, 0.0
	2, 5.0, 10.0, 0.0
	3, 0.0, 5.0, 0.0
	4, 5.0, 5.0, 0.0
*ELEMENT, type=S4, ELSET=ALL
	1, 1, 3, 4, 2
*MATERIAL, NAME=STEEL
	*ELASTIC
		2e+5, 0.3
*SHELL SECTION, ELSET=ALL, MATERIAL=STEEL
	0.1
*STEP
	*NO ANALYSIS
*END STEP
